// COMSOL Multiphysics 5.4.0.225 model "zadatak1.mph"
// Outline of the model tree

Geometry
  geom1 "Geometry 1" (2D axisymmetric, length unit m)
    imp1: Import
      type = native
      filename = C:\Users\kenan\Downloads\Geometrija_lab4\Bushing1.mphbin
      meshfilename = C:\Users\kenan\Downloads\Geometrija_lab4\Bushing1.mphbin
    fin: Finalize "Form Union"

Materials
  mat1: Common "Material 1" on domains 3
    def "Basic"
      relpermittivity = 1
  mat2: Common "Bakelite [solid]" on domains 2
    def "Basic"
      thermalconductivity = k(T[1/K])[W/(m*K)]
      heatcapacity = C(T[1/K])[J/(kg*K)]
      emissivity = epsilon(T[1/K])
      density = rho(T[1/K])[kg/m^3]
      TD = TD(T[1/K])[m^2/s]
      relpermittivity = 4.9
      k: Piecewise | arg = T; pieces = {293.0, 398.0, -57.56892+0.7052359*T^1-0.003208286*T^2+6.458182E-6*T^3-4.848485E-9*T^4}
      C: Piecewise | arg = T; pieces = {4.4, 9.2, 48.32616-31.11098*T^1+7.28821*T^2-0.7052191*T^3+0.02576418*T^4}
      epsilon: Piecewise | arg = T; pieces = {175.0, 300.0, 0.3902404+0.00548722*T^1-2.149959E-5*T^2+2.563778E-8*T^3}
      rho: Piecewise | arg = T; pieces = {293.0, 303.0, 1318.0}
      TD: Piecewise | arg = T; pieces = {293.0, 398.0, -2.034824E-5+2.572541E-7*T^1-1.215042E-9*T^2+2.546341E-12*T^3-1.993245E-15*T^4}
  mat3: Common "Material 3" on domains 1
    def "Basic"
      relpermittivity = 2.2

Physics
  es: Electrostatics on all domains
    dependent variable V
    ccn1: ChargeConservation (default)
    axi1: AxialSymmetry (default)
    zc1: ZeroCharge (default)
    init1: init "Initial Values 1" (default)
    gnd1: Ground on boundaries 10, 11, 13
    pot1: ElectricPotential on boundaries 1, 3, 5 | V0 = 123000

Mesh
  mesh1 "Mesh 1" (physics-controlled)

Studies
  std1 "Study 1"
    stat: Stationary

Solver configurations
  sol1 "Solution 1" (study std1)
    v1: Variables "Dependent Variables 1"
    s1: Stationary "Stationary Solver 1"
      dDef: Direct
      fc1: FullyCoupled | linsolver = dDef

Datasets
  dset1: Solution | solution = sol1
  rev1: Revolve2D "Revolution 2D 1" | data = dset1
  cln1: CutLine2D | data = dset1; genpoints = {{0, 0.3}, {1, 0.30}}

Plots
  pg1: PlotGroup2D "Electric Potential (es)" | data = dset1
    surf1: Surface | expr = V
  pg2: PlotGroup3D "Electric Potential, Revolved Geometry (es)" | data = rev1
    surf1: Surface | expr = V
  pg3: PlotGroup2D "2D Plot Group 3" | data = dset1
    surf1: Surface | expr = es.normE; descr = Electric field norm
  pg4: PlotGroup3D "3D Plot Group 4" | data = rev1
    vol1: Volume | expr = V
  pg5: PlotGroup1D "1D Plot Group 5" | data = dset1
    lngr1: LineGraph | data = cln1; expr = es.normE; descr = Electric field norm